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/batch
! ANSYS input file written by Workbench version 2024 R2
! File used for geometry attach: C:\Users\jjk\Desktop\Capstone CAD\Version 2\Toaster Heating Simulation Model.stp
/title,wbnew--Steady-State Thermal (A5)
/COM,/COM,     ANSYSMotion, 2024.2
/com,--- Data in consistent MKS units. See Solving Units in the help system for more information.
/units,MKS
/prep7
! Turn off shape checking because checks already performed inside WB mesher.
! See help system for more information.
SHPP,OFF,,NOWARN
etcon,set             ! allow ANSYS to choose best KEYOP's for 180x elements, resets any applicable keyopt to MAPDL defaults
/com,*********** Nodes for the whole assembly ***********
nblock,3,,12103
(1i9,3e20.9e3)
     1470     7.374928805E-02    -2.805342945E-02    -1.521968000E-01
     1471     7.136803805E-02    -2.805342945E-02    -1.521968000E-01
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-1
/com,*********** Elements for Body 1 'Heating Plate|Heating board|Solid1' ***********
et,1,291
eblock,19,solid,,593
(19i9)
        1        1        1        1        0        0        0        0       10        0        1      153      276      227      158     1022     1353     1020     1018
     1043     1041
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-1
/com,*********** Elements for Body 2 'Heating Plate|flat 32 gauge nichrome wire|Solid1' ***********
et,2,279
eblock,19,solid,,34
(19i9)
        2        2        2        2        0        0        0        0       20        0      594     1502     1503     1505     1506     1576     1609     1573     1572
     1707     1710     1714     1708     1854     1850     1848     1849     1709     1711     1715     1717
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-1
/com,*********** Elements for Body 3 'Heating Plate|flat 32 gauge nichrome wire|Solid1[2]' ***********
et,3,279
eblock,19,solid,,34
(19i9)
        3        3        3        3        0        0        0        0       20        0      628     1918     1919     1921     1922     1992     2025     1989     1988
     2123     2126     2130     2124     2270     2266     2264     2265     2125     2127     2131     2133
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-1
/com,*********** Elements for Body 4 'Heating Plate|flat 32 gauge nichrome wire|Solid1[3]' ***********
et,4,279
eblock,19,solid,,34
(19i9)
        4        4        4        4        0        0        0        0       20        0      662     2334     2335     2337     2338     2408     2441     2405     2404
     2539     2542     2546     2540     2686     2682     2680     2681     2541     2543     2547     2549
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-1
/com,*********** Elements for Body 5 'Heating Plate|flat 32 gauge nichrome wire|Solid1[4]' ***********
et,5,279
eblock,19,solid,,34
(19i9)
        5        5        5        5        0        0        0        0       20        0      696     2750     2751     2753     2754     2824     2857     2821     2820
     2955     2958     2962     2956     3102     3098     3096     3097     2957     2959     2963     2965
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-1
/com,*********** Elements for Body 6 'Heating Plate|flat 32 gauge nichrome wire|Solid1[5]' ***********
et,6,279
eblock,19,solid,,34
(19i9)
        6        6        6        6        0        0        0        0       20        0      730     3166     3167     3169     3170     3240     3273     3237     3236
     3371     3374     3378     3372     3518     3514     3512     3513     3373     3375     3379     3381
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-1
/com,*********** Elements for Body 7 'Heating Plate|flat 32 gauge nichrome wire|Solid1[6]' ***********
et,7,279
eblock,19,solid,,34
(19i9)
        7        7        7        7        0        0        0        0       20        0      764     3582     3583     3585     3586     3656     3689     3653     3652
     3787     3790     3794     3788     3934     3930     3928     3929     3789     3791     3795     3797
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-1
/com,*********** Elements for Body 8 'Base|Solid1' ***********
et,8,291
eblock,19,solid,,1614
(19i9)
        8        8        8        8        0        0        0        0       10        0      798     4087     4115     4484     4479     5276     5400     5279     5278
     5399     7038
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-1
/com,*********** Elements for Body 9 'Heating board|Solid1' ***********
et,9,291
eblock,19,solid,,593
(19i9)
        9        9        9        9        0        0        0        0       10        0     2412     7191     7314     7265     7196     8060     8391     8058     8056
     8081     8079
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-1
/com,*********** Elements for Body 10 'flat 32 gauge nichrome wire|Solid1' ***********
et,10,279
eblock,19,solid,,34
(19i9)
       10       10       10       10        0        0        0        0       20        0     3005     8540     8541     8543     8544     8614     8647     8611     8610
     8745     8748     8752     8746     8892     8888     8886     8887     8747     8749     8753     8755
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-1
/com,*********** Elements for Body 11 'flat 32 gauge nichrome wire|Solid1[2]' ***********
et,11,279
eblock,19,solid,,34
(19i9)
       11       11       11       11        0        0        0        0       20        0     3039     8956     8957     8959     8960     9030     9063     9027     9026
     9161     9164     9168     9162     9308     9304     9302     9303     9163     9165     9169     9171
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-1
/com,*********** Elements for Body 12 'flat 32 gauge nichrome wire|Solid1[3]' ***********
et,12,279
eblock,19,solid,,34
(19i9)
       12       12       12       12        0        0        0        0       20        0     3073     9372     9373     9375     9376     9446     9479     9443     9442
     9577     9580     9584     9578     9724     9720     9718     9719     9579     9581     9585     9587
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-1
/com,*********** Elements for Body 13 'flat 32 gauge nichrome wire|Solid1[4]' ***********
et,13,279
eblock,19,solid,,34
(19i9)
       13       13       13       13        0        0        0        0       20        0     3107     9788     9789     9791     9792     9862     9895     9859     9858
     9993     9996    10000     9994    10140    10136    10134    10135     9995     9997    10001    10003
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-1
/com,*********** Elements for Body 14 'flat 32 gauge nichrome wire|Solid1[5]' ***********
et,14,279
eblock,19,solid,,34
(19i9)
       14       14       14       14        0        0        0        0       20        0     3141    10204    10205    10207    10208    10278    10311    10275    10274
    10409    10412    10416    10410    10556    10552    10550    10551    10411    10413    10417    10419
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-1
/com,*********** Elements for Body 15 'flat 32 gauge nichrome wire|Solid1[6]' ***********
et,15,279
eblock,19,solid,,34
(19i9)
       15       15       15       15        0        0        0        0       20        0     3175    10620    10621    10623    10624    10694    10727    10691    10690
    10825    10828    10832    10826    10972    10968    10966    10967    10827    10829    10833    10835
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-1
/com,*********** Send User Defined Coordinate System(s) ***********
csys,0
toffst,273.15,      ! Temperature offset from absolute zero
/com,*********** Send Materials ***********
MP,KXX,1,0.34,	! W m^-1 C^-1
MP,DENS,1,2500,	! kg m^-3
MP,C,1,500,	! J kg^-1 C^-1

MP,DENS,2,8900,	! kg m^-3
MP,C,2,460.6,	! J kg^-1 C^-1
MP,KXX,2,91.74,	! W m^-1 C^-1

MP,DENS,3,8900,	! kg m^-3
MP,C,3,460.6,	! J kg^-1 C^-1
MP,KXX,3,91.74,	! W m^-1 C^-1

MP,DENS,4,8900,	! kg m^-3
MP,C,4,460.6,	! J kg^-1 C^-1
MP,KXX,4,91.74,	! W m^-1 C^-1

MP,DENS,5,8900,	! kg m^-3
MP,C,5,460.6,	! J kg^-1 C^-1
MP,KXX,5,91.74,	! W m^-1 C^-1

MP,DENS,6,8900,	! kg m^-3
MP,C,6,460.6,	! J kg^-1 C^-1
MP,KXX,6,91.74,	! W m^-1 C^-1

MP,DENS,7,8900,	! kg m^-3
MP,C,7,460.6,	! J kg^-1 C^-1
MP,KXX,7,91.74,	! W m^-1 C^-1

MP,KXX,8,0.34,	! W m^-1 C^-1
MP,DENS,8,2500,	! kg m^-3
MP,C,8,500,	! J kg^-1 C^-1

MP,KXX,9,0.34,	! W m^-1 C^-1
MP,DENS,9,2500,	! kg m^-3
MP,C,9,500,	! J kg^-1 C^-1

MP,DENS,10,8900,	! kg m^-3
MP,C,10,460.6,	! J kg^-1 C^-1
MP,KXX,10,91.74,	! W m^-1 C^-1

MP,DENS,11,8900,	! kg m^-3
MP,C,11,460.6,	! J kg^-1 C^-1
MP,KXX,11,91.74,	! W m^-1 C^-1

MP,DENS,12,8900,	! kg m^-3
MP,C,12,460.6,	! J kg^-1 C^-1
MP,KXX,12,91.74,	! W m^-1 C^-1

MP,DENS,13,8900,	! kg m^-3
MP,C,13,460.6,	! J kg^-1 C^-1
MP,KXX,13,91.74,	! W m^-1 C^-1

MP,DENS,14,8900,	! kg m^-3
MP,C,14,460.6,	! J kg^-1 C^-1
MP,KXX,14,91.74,	! W m^-1 C^-1

MP,DENS,15,8900,	! kg m^-3
MP,C,15,460.6,	! J kg^-1 C^-1
MP,KXX,15,91.74,	! W m^-1 C^-1

!************************* Model Summary ********************
!Heating Plate|Heating board|Solid1,	Mica,	matid,	1
!Heating Plate|flat 32 gauge nichrome wire|Solid1,	Nickel,	matid,	2
!Heating Plate|flat 32 gauge nichrome wire|Solid1[2],	Nickel,	matid,	3
!Heating Plate|flat 32 gauge nichrome wire|Solid1[3],	Nickel,	matid,	4
!Heating Plate|flat 32 gauge nichrome wire|Solid1[4],	Nickel,	matid,	5
!Heating Plate|flat 32 gauge nichrome wire|Solid1[5],	Nickel,	matid,	6
!Heating Plate|flat 32 gauge nichrome wire|Solid1[6],	Nickel,	matid,	7
!Base|Solid1,	Mica,	matid,	8
!Heating board|Solid1,	Mica,	matid,	9
!flat 32 gauge nichrome wire|Solid1,	Nickel,	matid,	10
!flat 32 gauge nichrome wire|Solid1[2],	Nickel,	matid,	11
!flat 32 gauge nichrome wire|Solid1[3],	Nickel,	matid,	12
!flat 32 gauge nichrome wire|Solid1[4],	Nickel,	matid,	13
!flat 32 gauge nichrome wire|Solid1[5],	Nickel,	matid,	14
!flat 32 gauge nichrome wire|Solid1[6],	Nickel,	matid,	15
!************************* End Model Summary ********************
/com,*********** Create Contact "Contact Region" ***********
*set,tid,17
*set,cid,16
r,tid
r,cid
et,tid,170
et,cid,174
eblock,10,,,32
(15i9)
     6873       17       17       17        0       27      110      124      124      453      822      124      455
     6874       17       17       17        0       37       70       88       88      512      668       88      514
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-1
eblock,10,,,32
(15i9)
     6905       16       16       16        0       27      110      124      124      453      822      124      455
     6906       16       16       16        0       37       70       88       88      512      668       88      514
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-1
eblock,10,,,34
(15i9)
     6937       16       17       16        0     1609     1576     1502     1503     1854     1709     1707     1711
     6938       16       17       16        0     1576     1577     1501     1502     1853     1706     1704     1709
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-1
eblock,10,,,34
(15i9)
     6971       17       16       17        0     1609     1576     1502     1503     1854     1709     1707     1711
     6972       17       16       17        0     1576     1577     1501     1502     1853     1706     1704     1709
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-1
keyo,cid,8,2               ! auto create asymmetric contact (from Program Controlled setting)
keyo,cid,10,0              ! adjust contact stiffness each NR iteration (from Program Controlled setting)
keyo,cid,12,5              ! bonded always
keyo,cid,18,1              ! small sliding turned on by application
keyo,cid,2,0               ! augmented Lagrange (from Program Controlled setting)
keyo,cid,4,0               ! on Gauss point (from Program Controlled setting)
keyo,cid,9,1               ! ignore initial gaps/penetration
keyo,cid,7,0               ! No Prediction
rmod,tid,3,10.      ! FKN
rmod,tid,5,0.       ! ICONT
rmod,tid,6,0.       ! PINB
rmod,tid,10,0.      ! CNOF
rmod,tid,12,0.      ! FKT
rmod,tid,36,68      ! WB DSID
rmod,cid,3,10.      ! FKN
rmod,cid,5,0.       ! ICONT
rmod,cid,6,0.       ! PINB
rmod,cid,10,0.      ! CNOF
rmod,cid,12,0.      ! FKT
rmod,cid,36,68      ! WB DSID
*set,_maxkxx,917400.
rmod,cid,14,_maxkxx/_ASMDIAG         ! TCC, Divide by Length since Traction Based
rmod,tid,14,_maxkxx/_ASMDIAG      ! TCC, Divide by Length since Traction Based
keyo,cid,1,2     ! Pure thermal contact
/com,*********** Create Contact "Contact Region 2" ***********
*set,tid,19
*set,cid,18
r,tid
r,cid
et,tid,170
et,cid,174
eblock,10,,,19
(15i9)
     7005       19       19       19        0       90      181       91       91      745      749       91      743
     7006       19       19       19        0       90      175      181      181      744     1125      181      745
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-1
eblock,10,,,19
(15i9)
     7024       18       18       18        0       90      181       91       91      745      749       91      743
     7025       18       18       18        0       90      175      181      181      744     1125      181      745
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-1
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eblock,10,,,34
(15i9)
     7077       19       18       19        0     2025     1992     1918     1919     2270     2125     2123     2127
     7078       19       18       19        0     1992     1993     1917     1918     2269     2122     2120     2125
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-1
keyo,cid,8,2               ! auto create asymmetric contact (from Program Controlled setting)
keyo,cid,10,0              ! adjust contact stiffness each NR iteration (from Program Controlled setting)
keyo,cid,12,5              ! bonded always
keyo,cid,18,1              ! small sliding turned on by application
keyo,cid,2,0               ! augmented Lagrange (from Program Controlled setting)
keyo,cid,4,0               ! on Gauss point (from Program Controlled setting)
keyo,cid,9,1               ! ignore initial gaps/penetration
keyo,cid,7,0               ! No Prediction
rmod,tid,3,10.      ! FKN
rmod,tid,5,0.       ! ICONT
rmod,tid,6,0.       ! PINB
rmod,tid,10,0.      ! CNOF
rmod,tid,12,0.      ! FKT
rmod,tid,36,71      ! WB DSID
rmod,cid,3,10.      ! FKN
rmod,cid,5,0.       ! ICONT
rmod,cid,6,0.       ! PINB
rmod,cid,10,0.      ! CNOF
rmod,cid,12,0.      ! FKT
rmod,cid,36,71      ! WB DSID
*set,_maxkxx,917400.
rmod,cid,14,_maxkxx/_ASMDIAG         ! TCC, Divide by Length since Traction Based
rmod,tid,14,_maxkxx/_ASMDIAG      ! TCC, Divide by Length since Traction Based
keyo,cid,1,2     ! Pure thermal contact
/com,*********** Create Contact "Contact Region 3" ***********
*set,tid,21
*set,cid,20
r,tid
r,cid
et,tid,170
et,cid,174
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eblock,10,,,34
(15i9)
     7191       21       20       21        0     2441     2408     2334     2335     2686     2541     2539     2543
     7192       21       20       21        0     2408     2409     2333     2334     2685     2538     2536     2541
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-1
keyo,cid,8,2               ! auto create asymmetric contact (from Program Controlled setting)
keyo,cid,10,0              ! adjust contact stiffness each NR iteration (from Program Controlled setting)
keyo,cid,12,5              ! bonded always
keyo,cid,18,1              ! small sliding turned on by application
keyo,cid,2,0               ! augmented Lagrange (from Program Controlled setting)
keyo,cid,4,0               ! on Gauss point (from Program Controlled setting)
keyo,cid,9,1               ! ignore initial gaps/penetration
keyo,cid,7,0               ! No Prediction
rmod,tid,3,10.      ! FKN
rmod,tid,5,0.       ! ICONT
rmod,tid,6,0.       ! PINB
rmod,tid,10,0.      ! CNOF
rmod,tid,12,0.      ! FKT
rmod,tid,36,74      ! WB DSID
rmod,cid,3,10.      ! FKN
rmod,cid,5,0.       ! ICONT
rmod,cid,6,0.       ! PINB
rmod,cid,10,0.      ! CNOF
rmod,cid,12,0.      ! FKT
rmod,cid,36,74      ! WB DSID
*set,_maxkxx,917400.
rmod,cid,14,_maxkxx/_ASMDIAG         ! TCC, Divide by Length since Traction Based
rmod,tid,14,_maxkxx/_ASMDIAG      ! TCC, Divide by Length since Traction Based
keyo,cid,1,2     ! Pure thermal contact
/com,*********** Create Contact "Contact Region 4" ***********
*set,tid,23
*set,cid,22
r,tid
r,cid
et,tid,170
et,cid,174
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eblock,10,,,34
(15i9)
     7307       23       22       23        0     2857     2824     2750     2751     3102     2957     2955     2959
     7308       23       22       23        0     2824     2825     2749     2750     3101     2954     2952     2957
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-1
keyo,cid,8,2               ! auto create asymmetric contact (from Program Controlled setting)
keyo,cid,10,0              ! adjust contact stiffness each NR iteration (from Program Controlled setting)
keyo,cid,12,5              ! bonded always
keyo,cid,18,1              ! small sliding turned on by application
keyo,cid,2,0               ! augmented Lagrange (from Program Controlled setting)
keyo,cid,4,0               ! on Gauss point (from Program Controlled setting)
keyo,cid,9,1               ! ignore initial gaps/penetration
keyo,cid,7,0               ! No Prediction
rmod,tid,3,10.      ! FKN
rmod,tid,5,0.       ! ICONT
rmod,tid,6,0.       ! PINB
rmod,tid,10,0.      ! CNOF
rmod,tid,12,0.      ! FKT
rmod,tid,36,77      ! WB DSID
rmod,cid,3,10.      ! FKN
rmod,cid,5,0.       ! ICONT
rmod,cid,6,0.       ! PINB
rmod,cid,10,0.      ! CNOF
rmod,cid,12,0.      ! FKT
rmod,cid,36,77      ! WB DSID
*set,_maxkxx,917400.
rmod,cid,14,_maxkxx/_ASMDIAG         ! TCC, Divide by Length since Traction Based
rmod,tid,14,_maxkxx/_ASMDIAG      ! TCC, Divide by Length since Traction Based
keyo,cid,1,2     ! Pure thermal contact
/com,*********** Create Contact "Contact Region 5" ***********
*set,tid,25
*set,cid,24
r,tid
r,cid
et,tid,170
et,cid,174
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eblock,10,,,34
(15i9)
     7417       25       24       25        0     3273     3240     3166     3167     3518     3373     3371     3375
     7418       25       24       25        0     3240     3241     3165     3166     3517     3370     3368     3373
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-1
keyo,cid,8,2               ! auto create asymmetric contact (from Program Controlled setting)
keyo,cid,10,0              ! adjust contact stiffness each NR iteration (from Program Controlled setting)
keyo,cid,12,5              ! bonded always
keyo,cid,18,1              ! small sliding turned on by application
keyo,cid,2,0               ! augmented Lagrange (from Program Controlled setting)
keyo,cid,4,0               ! on Gauss point (from Program Controlled setting)
keyo,cid,9,1               ! ignore initial gaps/penetration
keyo,cid,7,0               ! No Prediction
rmod,tid,3,10.      ! FKN
rmod,tid,5,0.       ! ICONT
rmod,tid,6,0.       ! PINB
rmod,tid,10,0.      ! CNOF
rmod,tid,12,0.      ! FKT
rmod,tid,36,80      ! WB DSID
rmod,cid,3,10.      ! FKN
rmod,cid,5,0.       ! ICONT
rmod,cid,6,0.       ! PINB
rmod,cid,10,0.      ! CNOF
rmod,cid,12,0.      ! FKT
rmod,cid,36,80      ! WB DSID
*set,_maxkxx,917400.
rmod,cid,14,_maxkxx/_ASMDIAG         ! TCC, Divide by Length since Traction Based
rmod,tid,14,_maxkxx/_ASMDIAG      ! TCC, Divide by Length since Traction Based
keyo,cid,1,2     ! Pure thermal contact
/com,*********** Create Contact "Contact Region 6" ***********
*set,tid,27
*set,cid,26
r,tid
r,cid
et,tid,170
et,cid,174
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eblock,10,,,34
(15i9)
     7539       27       26       27        0     3689     3656     3582     3583     3934     3789     3787     3791
     7540       27       26       27        0     3656     3657     3581     3582     3933     3786     3784     3789
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-1
keyo,cid,8,2               ! auto create asymmetric contact (from Program Controlled setting)
keyo,cid,10,0              ! adjust contact stiffness each NR iteration (from Program Controlled setting)
keyo,cid,12,5              ! bonded always
keyo,cid,18,1              ! small sliding turned on by application
keyo,cid,2,0               ! augmented Lagrange (from Program Controlled setting)
keyo,cid,4,0               ! on Gauss point (from Program Controlled setting)
keyo,cid,9,1               ! ignore initial gaps/penetration
keyo,cid,7,0               ! No Prediction
rmod,tid,3,10.      ! FKN
rmod,tid,5,0.       ! ICONT
rmod,tid,6,0.       ! PINB
rmod,tid,10,0.      ! CNOF
rmod,tid,12,0.      ! FKT
rmod,tid,36,83      ! WB DSID
rmod,cid,3,10.      ! FKN
rmod,cid,5,0.       ! ICONT
rmod,cid,6,0.       ! PINB
rmod,cid,10,0.      ! CNOF
rmod,cid,12,0.      ! FKT
rmod,cid,36,83      ! WB DSID
*set,_maxkxx,917400.
rmod,cid,14,_maxkxx/_ASMDIAG         ! TCC, Divide by Length since Traction Based
rmod,tid,14,_maxkxx/_ASMDIAG      ! TCC, Divide by Length since Traction Based
keyo,cid,1,2     ! Pure thermal contact
/com,*********** Create Contact "Contact Region 7" ***********
*set,tid,29
*set,cid,28
r,tid
r,cid
et,tid,170
et,cid,174
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eblock,10,,,108
(15i9)
     7829       29       28       29        0     4282     4263     4262     4262     6142     6132     4262     6133
     7830       29       28       29        0     4282     4283     4263     4263     6242     6143     4263     6142
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-1
keyo,cid,8,2               ! auto create asymmetric contact (from Program Controlled setting)
keyo,cid,10,0              ! adjust contact stiffness each NR iteration (from Program Controlled setting)
keyo,cid,12,5              ! bonded always
keyo,cid,18,1              ! small sliding turned on by application
keyo,cid,2,0               ! augmented Lagrange (from Program Controlled setting)
keyo,cid,4,0               ! on Gauss point (from Program Controlled setting)
keyo,cid,9,1               ! ignore initial gaps/penetration
keyo,cid,7,0               ! No Prediction
rmod,tid,3,10.      ! FKN
rmod,tid,5,0.       ! ICONT
rmod,tid,6,0.       ! PINB
rmod,tid,10,0.      ! CNOF
rmod,tid,12,0.      ! FKT
rmod,tid,36,86      ! WB DSID
rmod,cid,3,10.      ! FKN
rmod,cid,5,0.       ! ICONT
rmod,cid,6,0.       ! PINB
rmod,cid,10,0.      ! CNOF
rmod,cid,12,0.      ! FKT
rmod,cid,36,86      ! WB DSID
*set,_maxkxx,917400.
rmod,cid,14,_maxkxx/_ASMDIAG         ! TCC, Divide by Length since Traction Based
rmod,tid,14,_maxkxx/_ASMDIAG      ! TCC, Divide by Length since Traction Based
keyo,cid,1,2     ! Pure thermal contact
/com,*********** Create Contact "Contact Region 8" ***********
*set,tid,31
*set,cid,30
r,tid
r,cid
et,tid,170
et,cid,174
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eblock,10,,,74
(15i9)
     8231       31       30       31        0     7064     7176     7063     7063     7488     7484     7063     7481
     8232       31       30       31        0     7064     7175     7176     7176     7487     7977     7176     7488
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-1
keyo,cid,8,2               ! auto create asymmetric contact (from Program Controlled setting)
keyo,cid,10,0              ! adjust contact stiffness each NR iteration (from Program Controlled setting)
keyo,cid,12,5              ! bonded always
keyo,cid,18,1              ! small sliding turned on by application
keyo,cid,2,0               ! augmented Lagrange (from Program Controlled setting)
keyo,cid,4,0               ! on Gauss point (from Program Controlled setting)
keyo,cid,9,1               ! ignore initial gaps/penetration
keyo,cid,7,0               ! No Prediction
rmod,tid,3,10.      ! FKN
rmod,tid,5,0.       ! ICONT
rmod,tid,6,0.       ! PINB
rmod,tid,10,0.      ! CNOF
rmod,tid,12,0.      ! FKT
rmod,tid,36,89      ! WB DSID
rmod,cid,3,10.      ! FKN
rmod,cid,5,0.       ! ICONT
rmod,cid,6,0.       ! PINB
rmod,cid,10,0.      ! CNOF
rmod,cid,12,0.      ! FKT
rmod,cid,36,89      ! WB DSID
*set,_maxkxx,917400.
rmod,cid,14,_maxkxx/_ASMDIAG         ! TCC, Divide by Length since Traction Based
rmod,tid,14,_maxkxx/_ASMDIAG      ! TCC, Divide by Length since Traction Based
keyo,cid,1,2     ! Pure thermal contact
/com,*********** Create Contact "Contact Region 9" ***********
*set,tid,33
*set,cid,32
r,tid
r,cid
et,tid,170
et,cid,174
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eblock,10,,,34
(15i9)
     8403       33       32       33        0     8647     8614     8540     8541     8892     8747     8745     8749
     8404       33       32       33        0     8614     8615     8539     8540     8891     8744     8742     8747
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-1
keyo,cid,8,2               ! auto create asymmetric contact (from Program Controlled setting)
keyo,cid,10,0              ! adjust contact stiffness each NR iteration (from Program Controlled setting)
keyo,cid,12,5              ! bonded always
keyo,cid,18,1              ! small sliding turned on by application
keyo,cid,2,0               ! augmented Lagrange (from Program Controlled setting)
keyo,cid,4,0               ! on Gauss point (from Program Controlled setting)
keyo,cid,9,1               ! ignore initial gaps/penetration
keyo,cid,7,0               ! No Prediction
rmod,tid,3,10.      ! FKN
rmod,tid,5,0.       ! ICONT
rmod,tid,6,0.       ! PINB
rmod,tid,10,0.      ! CNOF
rmod,tid,12,0.      ! FKT
rmod,tid,36,92      ! WB DSID
rmod,cid,3,10.      ! FKN
rmod,cid,5,0.       ! ICONT
rmod,cid,6,0.       ! PINB
rmod,cid,10,0.      ! CNOF
rmod,cid,12,0.      ! FKT
rmod,cid,36,92      ! WB DSID
*set,_maxkxx,917400.
rmod,cid,14,_maxkxx/_ASMDIAG         ! TCC, Divide by Length since Traction Based
rmod,tid,14,_maxkxx/_ASMDIAG      ! TCC, Divide by Length since Traction Based
keyo,cid,1,2     ! Pure thermal contact
/com,*********** Create Contact "Contact Region 10" ***********
*set,tid,35
*set,cid,34
r,tid
r,cid
et,tid,170
et,cid,174
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eblock,10,,,34
(15i9)
     8509       35       34       35        0     9063     9030     8956     8957     9308     9163     9161     9165
     8510       35       34       35        0     9030     9031     8955     8956     9307     9160     9158     9163
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-1
keyo,cid,8,2               ! auto create asymmetric contact (from Program Controlled setting)
keyo,cid,10,0              ! adjust contact stiffness each NR iteration (from Program Controlled setting)
keyo,cid,12,5              ! bonded always
keyo,cid,18,1              ! small sliding turned on by application
keyo,cid,2,0               ! augmented Lagrange (from Program Controlled setting)
keyo,cid,4,0               ! on Gauss point (from Program Controlled setting)
keyo,cid,9,1               ! ignore initial gaps/penetration
keyo,cid,7,0               ! No Prediction
rmod,tid,3,10.      ! FKN
rmod,tid,5,0.       ! ICONT
rmod,tid,6,0.       ! PINB
rmod,tid,10,0.      ! CNOF
rmod,tid,12,0.      ! FKT
rmod,tid,36,95      ! WB DSID
rmod,cid,3,10.      ! FKN
rmod,cid,5,0.       ! ICONT
rmod,cid,6,0.       ! PINB
rmod,cid,10,0.      ! CNOF
rmod,cid,12,0.      ! FKT
rmod,cid,36,95      ! WB DSID
*set,_maxkxx,917400.
rmod,cid,14,_maxkxx/_ASMDIAG         ! TCC, Divide by Length since Traction Based
rmod,tid,14,_maxkxx/_ASMDIAG      ! TCC, Divide by Length since Traction Based
keyo,cid,1,2     ! Pure thermal contact
/com,*********** Create Contact "Contact Region 11" ***********
*set,tid,37
*set,cid,36
r,tid
r,cid
et,tid,170
et,cid,174
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eblock,10,,,34
(15i9)
     8623       37       36       37        0     9479     9446     9372     9373     9724     9579     9577     9581
     8624       37       36       37        0     9446     9447     9371     9372     9723     9576     9574     9579
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-1
keyo,cid,8,2               ! auto create asymmetric contact (from Program Controlled setting)
keyo,cid,10,0              ! adjust contact stiffness each NR iteration (from Program Controlled setting)
keyo,cid,12,5              ! bonded always
keyo,cid,18,1              ! small sliding turned on by application
keyo,cid,2,0               ! augmented Lagrange (from Program Controlled setting)
keyo,cid,4,0               ! on Gauss point (from Program Controlled setting)
keyo,cid,9,1               ! ignore initial gaps/penetration
keyo,cid,7,0               ! No Prediction
rmod,tid,3,10.      ! FKN
rmod,tid,5,0.       ! ICONT
rmod,tid,6,0.       ! PINB
rmod,tid,10,0.      ! CNOF
rmod,tid,12,0.      ! FKT
rmod,tid,36,98      ! WB DSID
rmod,cid,3,10.      ! FKN
rmod,cid,5,0.       ! ICONT
rmod,cid,6,0.       ! PINB
rmod,cid,10,0.      ! CNOF
rmod,cid,12,0.      ! FKT
rmod,cid,36,98      ! WB DSID
*set,_maxkxx,917400.
rmod,cid,14,_maxkxx/_ASMDIAG         ! TCC, Divide by Length since Traction Based
rmod,tid,14,_maxkxx/_ASMDIAG      ! TCC, Divide by Length since Traction Based
keyo,cid,1,2     ! Pure thermal contact
/com,*********** Create Contact "Contact Region 12" ***********
*set,tid,39
*set,cid,38
r,tid
r,cid
et,tid,170
et,cid,174
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eblock,10,,,34
(15i9)
     8739       39       38       39        0     9895     9862     9788     9789    10140     9995     9993     9997
     8740       39       38       39        0     9862     9863     9787     9788    10139     9992     9990     9995
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-1
keyo,cid,8,2               ! auto create asymmetric contact (from Program Controlled setting)
keyo,cid,10,0              ! adjust contact stiffness each NR iteration (from Program Controlled setting)
keyo,cid,12,5              ! bonded always
keyo,cid,18,1              ! small sliding turned on by application
keyo,cid,2,0               ! augmented Lagrange (from Program Controlled setting)
keyo,cid,4,0               ! on Gauss point (from Program Controlled setting)
keyo,cid,9,1               ! ignore initial gaps/penetration
keyo,cid,7,0               ! No Prediction
rmod,tid,3,10.      ! FKN
rmod,tid,5,0.       ! ICONT
rmod,tid,6,0.       ! PINB
rmod,tid,10,0.      ! CNOF
rmod,tid,12,0.      ! FKT
rmod,tid,36,101     ! WB DSID
rmod,cid,3,10.      ! FKN
rmod,cid,5,0.       ! ICONT
rmod,cid,6,0.       ! PINB
rmod,cid,10,0.      ! CNOF
rmod,cid,12,0.      ! FKT
rmod,cid,36,101     ! WB DSID
*set,_maxkxx,917400.
rmod,cid,14,_maxkxx/_ASMDIAG         ! TCC, Divide by Length since Traction Based
rmod,tid,14,_maxkxx/_ASMDIAG      ! TCC, Divide by Length since Traction Based
keyo,cid,1,2     ! Pure thermal contact
/com,*********** Create Contact "Contact Region 13" ***********
*set,tid,41
*set,cid,40
r,tid
r,cid
et,tid,170
et,cid,174
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eblock,10,,,34
(15i9)
     8849       41       40       41        0    10311    10278    10204    10205    10556    10411    10409    10413
     8850       41       40       41        0    10278    10279    10203    10204    10555    10408    10406    10411
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-1
keyo,cid,8,2               ! auto create asymmetric contact (from Program Controlled setting)
keyo,cid,10,0              ! adjust contact stiffness each NR iteration (from Program Controlled setting)
keyo,cid,12,5              ! bonded always
keyo,cid,18,1              ! small sliding turned on by application
keyo,cid,2,0               ! augmented Lagrange (from Program Controlled setting)
keyo,cid,4,0               ! on Gauss point (from Program Controlled setting)
keyo,cid,9,1               ! ignore initial gaps/penetration
keyo,cid,7,0               ! No Prediction
rmod,tid,3,10.      ! FKN
rmod,tid,5,0.       ! ICONT
rmod,tid,6,0.       ! PINB
rmod,tid,10,0.      ! CNOF
rmod,tid,12,0.      ! FKT
rmod,tid,36,104     ! WB DSID
rmod,cid,3,10.      ! FKN
rmod,cid,5,0.       ! ICONT
rmod,cid,6,0.       ! PINB
rmod,cid,10,0.      ! CNOF
rmod,cid,12,0.      ! FKT
rmod,cid,36,104     ! WB DSID
*set,_maxkxx,917400.
rmod,cid,14,_maxkxx/_ASMDIAG         ! TCC, Divide by Length since Traction Based
rmod,tid,14,_maxkxx/_ASMDIAG      ! TCC, Divide by Length since Traction Based
keyo,cid,1,2     ! Pure thermal contact
/com,*********** Create Contact "Contact Region 14" ***********
*set,tid,43
*set,cid,42
r,tid
r,cid
et,tid,170
et,cid,174
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eblock,10,,,34
(15i9)
     8971       43       42       43        0    10727    10694    10620    10621    10972    10827    10825    10829
     8972       43       42       43        0    10694    10695    10619    10620    10971    10824    10822    10827
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-1
keyo,cid,8,2               ! auto create asymmetric contact (from Program Controlled setting)
keyo,cid,10,0              ! adjust contact stiffness each NR iteration (from Program Controlled setting)
keyo,cid,12,5              ! bonded always
keyo,cid,18,1              ! small sliding turned on by application
keyo,cid,2,0               ! augmented Lagrange (from Program Controlled setting)
keyo,cid,4,0               ! on Gauss point (from Program Controlled setting)
keyo,cid,9,1               ! ignore initial gaps/penetration
keyo,cid,7,0               ! No Prediction
rmod,tid,3,10.      ! FKN
rmod,tid,5,0.       ! ICONT
rmod,tid,6,0.       ! PINB
rmod,tid,10,0.      ! CNOF
rmod,tid,12,0.      ! FKT
rmod,tid,36,107     ! WB DSID
rmod,cid,3,10.      ! FKN
rmod,cid,5,0.       ! ICONT
rmod,cid,6,0.       ! PINB
rmod,cid,10,0.      ! CNOF
rmod,cid,12,0.      ! FKT
rmod,cid,36,107     ! WB DSID
*set,_maxkxx,917400.
rmod,cid,14,_maxkxx/_ASMDIAG         ! TCC, Divide by Length since Traction Based
rmod,tid,14,_maxkxx/_ASMDIAG      ! TCC, Divide by Length since Traction Based
keyo,cid,1,2     ! Pure thermal contact
nsel,all
esel,all
/com,*********** Create "Heat Flux" ***********
et,44,152
eblock,10,,,204
(15i9)
     9005       44       44       44        0     1506     1572     1573     1505     1717     1848     1715     1714
     9006       44       44       44        0     1507     1571     1572     1506     1719     1846     1717     1716
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-1
esel,s,type,,44
keyop,44,8,1        ! include heat flux
/com,*********** Create "Heat Flux 2" ***********
et,45,152
eblock,10,,,204
(15i9)
     9209       45       45       45        0     8544     8610     8611     8543     8755     8886     8753     8752
     9210       45       45       45        0     8545     8609     8610     8544     8757     8884     8755     8754
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-1
esel,s,type,,45
keyop,45,8,1        ! include heat flux
esel,all
fcum,add                   ! add nodal forces up (needed in case have loads on the same edge,vertex)
fcum                       ! reset default on fcum command since done sending WB F loads
/com,*********** Create "Convection" ***********
et,46,152
eblock,10,,,3664
(15i9)
     9413       46       46       46        0      187       15      188      188      377      378      188     1181
     9414       46       46       46        0      187       16       15       15      384      372       15      377
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-1
esel,s,type,,46
keyop,46,8,2
keyop,46,13,0
esel,all
/com,***************** Define Uniform Initial temperature ***************
tunif,22.
fini
/com,****************************************************************************
/com,*************************    SOLUTION       ********************************
/com,****************************************************************************
/solu
antype,0                   ! static analysis
!eqsl,sparse               ! using sparse solver which is default so no eqsl command needed
cntr,print,1               ! print out contact info and also make no initial contact an error
rescontrol,,none                 ! Do not keep any restart files
dmpoption,emat,no             ! Don't combine emat file for DANSYS
dmpoption,esav,no             ! Don't combine esav file for DANSYS
/com,****************************************************
/com,******************* SOLVE FOR LS 1 OF 1 ****************
esel,s,type,,44
nsle
sf,all,hflux,2770.
esel,s,type,,45
nsle
sf,all,hflux,2770.
nsel,all
esel,all
esel,s,type,,46
nsle
sf,all,conv,0.28,22.
nsel,all
esel,all
autots,on
nsub,1,10,1
time,10.
outres,erase
outres,all,none
outres,nsol,all
outres,rsol,all
outres,eangl,all
outres,veng,all
outres,fflux,all,
outres,cont,all,
esel,s,type,,46
cm,_elmisc,elem
esel,all
outres,misc,all,_elmisc
cnvtol,heat,,1.e-003,,1.e-006 ! Program Controlled. Set MINREF equivalent of 1e-6 Watts
! *********** WB SOLVE COMMAND ***********
! check interactive state
*get,ANSINTER_,active,,int
*if,ANSINTER_,ne,0,then
/eof
*endif
solve
/com *************** Write FE CONNECTORS *********
CEWRITE,file,ce,,INTE
/com,****************************************************
/com,*************** FINISHED SOLVE FOR LS 1 *************
/post1
fini
